# Appendix 1. Hand Calculation
# I. Data Set
f_1 := 160 Hz
f_2 := 237 Hz
f_3 := 240 Hz  # Analog frequency components of the signal
A_1 := 100
A_2 := 10
A_3 := 1  # Linear amplitude for each analog frequency component
f_s := 1000 Hz  # Sampling frequency
NFFT := 256
BinWidth := f_s/NFFT = 3.90625 Hz  # Analog frequency bin width of the FFT
Bin_f_1 := round(f_1/BinWidth) = 41  # Frequency bin index of analog frequency component f1
Bin_f_2 := round(f_2/BinWidth) = 61  # Frequency bin index of analog frequency component f2
Bin_f_3 := round(f_3/BinWidth) = 61  # Frequency bin index of analog frequency component f3
# Given the sampling frequency of 1000 Hz and NFFT = 256, the frequency bin indices for f2 and f3 are always 61, which is not affected by the window applied to the signal. Therefore, rectangular windowed FFT will not indicate distinct spectral peaks for f2 and f3.
20*log(A_1) = 40  # Magnitude of the peak corresponding to +/-f1
20*log(A_2) + 20*log(A_3) = 20  # Magnitude of the peak corresponding to +/-f2 and +/-f3 (same frequency bin)
# Therefore, after the normalization, the magnitude of the peak corresponding to +/-f1 is 0 dB and the magnitude of the peak corresponding to +/-f2 and +/-f3 (same frequency bin) is -20 dB.
# III. Complex Basebanding and Desampling
# 1. Complex basebanding:
f_0 := 250 Hz  # Center frequency
# Frequency components after complex basebanding:
f_1' := f_1 - f_0 = -90 Hz
f_2' := f_2 - f_0 = -13 Hz
f_3' := f_3 - f_0 = -10 Hz
f_1'' := -f_1 - f_0 = -410 Hz
f_2'' := -f_2 - f_0 = -487 Hz
f_3'' := -f_3 - f_0 = -490 Hz
# Complex basebanding does not change the magnitude of the signal. Therefore, the magnitude of peaks corresponding to each frequency component remain the same as previous.
# 2. Low-pass filtering:
# Low-pass filtering does not shift the frequency of the signal. Therefore, frequency values of the signal remain the same as previous.
20*log(A_1) - 40 = 0  # Magnitude of the peak corresponding to f1
20*log(A_2) + 20*log(A_3) = 20  # Magnitude of the peak corresponding to f2 and f3 (same frequency bin)
20*log(A_1) - 40 = 0  # Magnitude of the peak corresponding to -f1
20*log(A_2) + 20*log(A_3) - 40 = -20  # Magnitude of the peak corresponding to -f2 and -f3 (same frequency bin)
# Therefore, after the normalization, the magnitude of the peak corresponding to f1 is -20 dB; the magnitude of the peak corresponding to f2 and f3 (same frequency bin) is 0 dB; the magnitude of the peak corresponding to -f1 is -20 dB; the magnitude of the peak corresponding to -f2 and -f3 (same frequency bin) is -40 dB;
# IV. High Resolution Spectral Analysis
f_s' := f_s/8 = 125 Hz  # Sampling frequency after decimation
BinWidth := f_s'/NFFT = 0.488281 Hz  # Analog frequency bin width of the FFT after desampling
# Frequency components after desampling:
f_1' := f_1 - f_0 + f_s' = 35 Hz
f_2' := f_2 - f_0 = -13 Hz
f_3' := f_3 - f_0 = -10 Hz
f_1'' := -f_1 - f_0 + 3*f_s' = -35 Hz
f_2'' := -f_2 - f_0 + 4*f_s' = 13 Hz
f_3'' := -f_3 - f_0 + 4*f_s' = 10 Hz
20*log(A_1) - 40 = 0  # Magnitude of the peak corresponding to f1  # (-20 dB after normalization)
20*log(A_2) = 20  # Magnitude of the peak corresponding to f2
# (0 dB after normalization)
20*log(A_3) = 0  # Magnitude of the peak corresponding to f3
# (-20 dB after normalization)
20*log(A_1) - 40 = 0  # Magnitude of the peak corresponding to -f1  # (-20 dB after normalization)
20*log(A_2) - 40 = -20  # Magnitude of the peak corresponding to -f2  # (-40 dB after normalization)
20*log(A_3) - 40 = -40  # Magnitude of the peak corresponding to -f3  # (-60 dB after normalization)
